<?xml version="1.0" encoding="ISO-8859-1"?>
<neuroml xmlns="http://www.neuroml.org/schema/neuroml2" xmlns:xsi="http://www.w3.org/2001/XMLSchema-instance" xsi:schemaLocation="http://www.neuroml.org/schema/neuroml2 https://raw.github.com/NeuroML/NeuroML2/development/Schemas/NeuroML2/NeuroML_v2beta4.xsd" id="NeuroML_ionChannel">

    <notes>NeuroML file containing a single ion channel</notes>

    <ionChannel id="Ikdrs" conductance="1pS" type="ionChannelHH" species="k">

        <notes>Slow delayed rectifier K+ channel description  (from Lien 2002 - modeled by Migliore 2003)</notes>

        <gateHHtauInf id="m" instances="1">
            <q10Settings type="q10ExpTemp" q10Factor="3" experimentalTemp="23 degC"/>
            <timeCourse type="Lawrence2006_Ikdrsm_tau"/>
            <steadyState type="Lawrence2006_Ikdrsm_ss"/>
        </gateHHtauInf>

        <gateHHtauInf id="h" instances="1">
            <timeCourse type="fixedTimeCourse" tau="1000ms"/>
            <steadyState type="Lawrence2006_Ikdrsh_ss"/>
        </gateHHtauInf>

    </ionChannel>

    <ComponentType name="Lawrence2006_Ikdrsm_tau"
                   extends="baseVoltageDepTime"
                   description="Tau parameter to describe Ikdrs in Lawrence 2006">

        <Constant name="TIME_SCALE" dimension="time" value="1 ms"/>
        <Constant name="VOLT_SCALE" dimension="voltage" value="1 mV"/>

        <Requirement name="rateScale" dimension="none"/>

        <Dynamics>
            <DerivedVariable name="V" dimension="none" value="v / VOLT_SCALE"/>

            <DerivedVariable name="tmp" value="( (66.6667 * exp((V+25)/13.3333)) / (1 + exp((V+25)/6.6667)) )" dimension="none"/>
            <ConditionalDerivedVariable name="t" exposure="t" dimension="time">
                <Case condition="(tmp / rateScale) .lt. 7" value="7 * rateScale * TIME_SCALE"/>
                <Case value="tmp * TIME_SCALE"/>
            </ConditionalDerivedVariable>

        </Dynamics>

    </ComponentType>

    <ComponentType name="Lawrence2006_Ikdrsm_ss"
                   extends="baseVoltageDepVariable"
                   description="steadyState parameter to describe Ikdrs in Lawrence 2006">

        <Constant name="VOLT_SCALE" dimension="voltage" value="1 mV"/>

        <Dynamics>
            <DerivedVariable name="V" dimension="none" value="v / VOLT_SCALE"/>
            <DerivedVariable name="x" exposure="x" dimension="none" value="(1 / (1 + exp((V+41.9)/-23.1)))^4"/>
        </Dynamics>

    </ComponentType>

    <ComponentType name="Lawrence2006_Ikdrsh_ss"
                   extends="baseVoltageDepVariable"
                   description="steadyState parameter to describe Ikdrs in Lawrence 2006">

        <Constant name="VOLT_SCALE" dimension="voltage" value="1 mV"/>

        <Dynamics>
            <DerivedVariable name="V" dimension="none" value="v / VOLT_SCALE"/>
            <DerivedVariable name="x" exposure="x" dimension="none" value="(0.93 / (1 + exp((V + 52.2)/15.2))) + 0.07"/>
        </Dynamics>

    </ComponentType>

</neuroml>
