<?xml version="1.0" encoding="UTF-8"?>
<neuroml xmlns="http://www.neuroml.org/schema/neuroml2"
    xmlns:xsi="http://www.w3.org/2001/XMLSchema-instance"
    xsi:schemaLocation="http://www.neuroml.org/schema/neuroml2 https://raw.github.com/NeuroML/NeuroML2/development/Schemas/NeuroML2/NeuroML_v2beta4.xsd"
    id = "NeuroML2_file_exported_from_NEURON">

    <include href="ICaL.channel.nml"/>
    <include href="ICaT.channel.nml"/>
    <include href="IKCa.channel.nml"/>
    <include href="IMmintau.channel.nml"/>
    <include href="Ih.channel.nml"/>
    <include href="Ikdrf.channel.nml"/>
    <include href="Ikdrs.channel.nml"/>
    <include href="Kleak_chan.channel.nml"/>
    <include href="Nadend.channel.nml"/>
    <include href="Nasoma.channel.nml"/>
    <include href="leak_chan.channel.nml"/>

  <cell id="LawrenceOLM">

    <morphology id="morphology">
<!-- Section: LawrenceOLM[0].soma[0] (segmentGroup: soma_0) which has 2 3D points, so 1 segment(s)-->
      <segment id="0" name = "Seg0_soma_0">
        <proximal x="138.2" y="224.9" z="0.01" diameter="5.87"/>
        <distal x="138.2" y="224.9" z="-0.01" diameter="5.87"/>
      </segment>
<!-- Section: LawrenceOLM[0].dendrite[2] (segmentGroup: dendrite_2) which has 2 3D points, so 1 segment(s)-->
      <segment id="39" name = "Seg0_dendrite_2">
        <parent segment="0"/>
        <proximal x="138.2" y="224.9" z="-0.01" diameter="5.87"/>
        <distal x="133.6" y="228.2" z="0.73" diameter="3.52"/>
      </segment>
<!-- Section: LawrenceOLM[0].dendrite[1] (segmentGroup: dendrite_1) which has 27 3D points, so 26 segment(s)-->
      <segment id="13" name = "Seg0_dendrite_1">
        <parent segment="0"/>
        <proximal x="138.2" y="224.9" z="-0.01" diameter="5.87"/>
        <distal x="133.2" y="224.5" z="0.63" diameter="4.69"/>
      </segment>
      <segment id="14" name = "Seg1_dendrite_1">
        <parent segment="13"/>
        <distal x="130.1" y="224.7" z="-0.23" diameter="3.86"/>
      </segment>
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
<!-- Section: LawrenceOLM[0].soma[0] (segmentGroup: soma_0) which has 2 3D points, so 1 segment(s)-->

      <segmentGroup id = "soma_0"  neuroLexId="sao864921383">
         <notes>This group contains an unbranched set of segments, and all of the segmentGroups marked with
             neuroLexId = sao864921383 form a non-overlapping set of all of the segments.
             These segmentGroups correspond to the 'cables' of NeuroML v1.8.1, and map to/from NEURON sections.</notes>
        <member segment = "0"/>
      </segmentGroup>

<!-- Section: LawrenceOLM[0].dendrite[2] (segmentGroup: dendrite_2) which has 2 3D points, so 1 segment(s)-->

      <segmentGroup id = "dendrite_2"  neuroLexId="sao864921383">
         <notes>This group contains an unbranched set of segments, and all of the segmentGroups marked with
             neuroLexId = sao864921383 form a non-overlapping set of all of the segments.
             These segmentGroups correspond to the 'cables' of NeuroML v1.8.1, and map to/from NEURON sections.</notes>
        <member segment = "39"/>
      </segmentGroup>

<!-- Section: LawrenceOLM[0].dendrite[1] (segmentGroup: dendrite_1) which has 27 3D points, so 26 segment(s)-->

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
      <segmentGroup id="soma_group">
        <include segmentGroup = "soma_0"/>
        <include segmentGroup = "soma_1"/>
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      </segmentGroup>

      <segmentGroup id="dendrite_group">
        <include segmentGroup = "dendrite_2"/>
        <include segmentGroup = "dendrite_1"/>
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      </segmentGroup>

      <segmentGroup id="IM_group">  <!-- soma + some of the dendrites whose have M current-->
        <include segmentGroup = "soma_0"/>
        <include segmentGroup = "dendrite_2"/>
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      </segmentGroup>

      <segmentGroup id="axon_group">
        <include segmentGroup = "axon_0"/>
        <include segmentGroup = "axon_1"/>
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      </segmentGroup>

    </morphology>

    <!-- Biophysical properties -->

    <biophysicalProperties id="biophys">

      <membraneProperties>

        <channelDensity ionChannel="leak_chan" id="leak_soma_group" condDensity="0.011231 mS_per_cm2" segmentGroup="soma_group"  erev="-70mV" ion="non_specific"/>
        <channelDensity ionChannel="Kleak_chan" id="Kleak_soma_group" condDensity="0.0032258 mS_per_cm2" segmentGroup="soma_group"  erev="-95mV" ion="k"/>
        <channelDensity ionChannel="Nasoma" id="Nasoma_soma_group" condDensity="10.7mS_per_cm2" segmentGroup="soma_group"  erev="900mV" ion="na"/>
        <channelDensity ionChannel="IKa" id="IKa_soma_group" condDensity="0.25mS_per_cm2" segmentGroup="soma_group"  erev="-95mV" ion="k"/>
        <channelDensity ionChannel="Ikdrf" id="Ikdrf_soma_group" condDensity="0.6 mS_per_cm2" segmentGroup="soma_group" erev="-95mV" ion="k"/>
        <channelDensity ionChannel="Ikdrs" id="Ikdrs_soma_grop" condDensity="0.23 mS_per_cm2" segmentGroup="soma_group" erev="-95mV" ion="k"/>
        <channelDensity ionChannel="Ih" id="Ih_soma_group" condDensity="0.05 mS_per_cm2" segmentGroup="soma_group" erev="-32.9mV" ion="h"/>

        <channelDensity ionChannel="leak_chan" id="leak_dendrite_group" condDensity="0.011231 mS_per_cm2" segmentGroup="dendrite_group"  erev="-70mV" ion="non_specific"/>
        <channelDensity ionChannel="Kleak_chan" id="Kleak_dendrite_group" condDensity="0.0032258 mS_per_cm2" segmentGroup="dendrite_group"  erev="-95mV" ion="k"/>
        <channelDensity ionChannel="Nadend" id="Nadend_dendrite_group" condDensity="11.7mS_per_cm2" segmentGroup="dendrite_group"  erev="90mV" ion="na"/>
        <channelDensity ionChannel="IKa" id="IKa_dendrite_group" condDensity="0.25mS_per_cm2" segmentGroup="dendrite_group" erev="-95mV" ion="k"/>
        <channelDensity ionChannel="Ikdrf" id="Ikdrf_dendrite_group" condDensity="0.6 mS_per_cm2" segmentGroup="dendrite_group" erev="-95mV" ion="k"/>
        <channelDensity ionChannel="Ikdrs" id="Ikdrs_dendrite_grop" condDensity="0.23 mS_per_cm2" segmentGroup="dendrite_group" erev="-95mV" ion="k"/>
        <channelDensity ionChannel="IKCa" id="IKCa_dendrite_group" condDensity="0.55 mS_per_cm2" segmentGroup="dendrite_group" erev="-95mV" ion="k"/>
        <channelDensityGHK2 ionChannel="ICaL" id="ICaL_dendrite_group" condDensity="2.5mS_per_cm2" segmentGroup="dendrite_group" ion="ca"/>
        <channelDensityGHK2 ionChannel="ICaT" id="ICaT_dendrite_group" condDensity="0.25mS_per_cm2" segmentGroup="dendrite_group" ion="ca"/>

        <channelDensity ionChannel="IMmintau" id="IM_IM_group" condDensity="0.3mS_per_cm2" segmentGroup="IM_group" erev="-95mV" ion="k"/>

        <channelDensity ionChannel="leak_chan" id="leak_axon_group" condDensity="0.061771mS_per_cm2" segmentGroup="axon_group"  erev="-66.164mV" ion="non_specific"/>
        <channelDensity ionChannel="Kleak_chan" id="Kleak_axon_group" condDensity="0.017742mS_per_cm2" segmentGroup="axon_group"  erev="-95mV" ion="k"/>
        <channelDensity ionChannel="Nasoma" id="Nasoma_axon_group" condDensity="11.7mS_per_cm2" segmentGroup="axon_group"  erev="90mV" ion="na"/>
        <channelDensity ionChannel="Ikdrf" id="Ikdrf_axon_group" condDensity="0.6mS_per_cm2" segmentGroup="axon_group"  erev="-95mV" ion="k"/>
        <channelDensity ionChannel="Ikdrs" id="Ikdrs_axon_group" condDensity="0.23mS_per_cm2" segmentGroup="axon_group"  erev="-95mV" ion="k"/>

        <spikeThresh value="0 mV"/>
        <specificCapacitance  value="0.9 uF_per_cm2" />
        <initMembPotential value="-65.0 mV"/>

      </membraneProperties>

      <intracellularProperties>
        <resistivity value="0.3 kohm_cm" />
      </intracellularProperties>

    </biophysicalProperties>

  </cell>

</neuroml>
