<?xml version="1.0" encoding="ISO-8859-1"?>
<neuroml xmlns="http://www.neuroml.org/schema/neuroml2" xmlns:xsi="http://www.w3.org/2001/XMLSchema-instance" xsi:schemaLocation="http://www.neuroml.org/schema/neuroml2 https://raw.github.com/NeuroML/NeuroML2/development/Schemas/NeuroML2/NeuroML_v2beta4.xsd" id="NeuroML_ionChannel">

    <notes>NeuroML file containing a single ion channel</notes>

    <ionChannel id="Nadend" conductance="1pS" type="ionChannelHH" species="na">

        <notes>Na+ channel description (from Martina, Vida and Jonas 2000, Marina and Jonas 1997 - modeled by Skinner lab 2003, modified by Lawrence 2006)</notes>

        <gateHHrates id="m" instances="3">
            <forwardRate type="HHExpLinearRate" rate="1per_ms" midpoint="-45mV" scale="10mV"/>
            <reverseRate type="HHExpRate" rate="4per_ms" midpoint="-70mV" scale="-18mV"/>
        </gateHHrates>

        <gateHHrates id="h" instances="1">
            <q10Settings type="q10ExpTemp" q10Factor="3" experimentalTemp="24 degC"/>
            <forwardRate type="HHExpRate" rate="0.07per_ms" midpoint="-63mV" scale="-20mV"/>
            <reverseRate type="HHSigmoidRate" rate="1per_ms" midpoint="-33mV" scale="10mV"/>
        </gateHHrates>

    </ionChannel>

</neuroml>
