<?xml version="1.0" encoding="UTF-8"?>
<neuroml xmlns="http://www.neuroml.org/schema/neuroml2"
         xmlns:xsi="http://www.w3.org/2001/XMLSchema-instance"
         xsi:schemaLocation="http://www.neuroml.org/schema/neuroml2  https://raw.github.com/NeuroML/NeuroML2/development/Schemas/NeuroML2/NeuroML_v2beta2.xsd"
         id="olm1">

    <include href="../../IKCa.channel.nml"/>
    <include href="../../ICaL.channel.nml"/>
    <include href="../../ICaT.channel.nml"/>
    <include href="../../channelDensityGHK2.xml"/>
    <include href="CaClamp.nml"/>

    <!-- Passive conductance -->
    <ionChannel id="leak" type="ionChannelPassive" conductance="10pS" species="non_specific"/>

    <!-- Intracellular Calcium dynamics -->
    <fixedFactorConcentrationModel id="simple_decay"
                      ion="ca"
                      restingConc="3e-6 mM"
                      decayConstant="1.0 ms"
                      rho="3e-1 mol_per_m_per_A_per_s"/>

    <!-- Cellular properties -->
    <cell id="olm1">

        <morphology id="just_a_cylinder">

            <segment id="0" name="Soma">
                <proximal x="0.0" y="0.0" z="0.0" diameter="1.0"/>
                <distal x="0.0" y="0.0" z="10.0" diameter="1.0"/>
            </segment>

            <segmentGroup id="soma_group">
                <member segment="0"/>
            </segmentGroup>

        </morphology>

        <biophysicalProperties id="biophys">

            <membraneProperties>

                <channelDensity condDensity="0.1 mS_per_cm2" id="kca_all" ionChannel="IKCa" erev="-95 mV" ion="k"/>
                <channelDensity condDensity="0.3 mS_per_cm2" id="passive" ionChannel="leak" erev="-65 mV" ion="non_specific"/>
                <channelDensityGHK2 condDensity="0.02 mS_per_cm2" id="cal_all" ionChannel="ICaT" ion="ca"/>
                <channelDensityGHK2 condDensity="0.02 mS_per_cm2" id="cat_all" ionChannel="ICaL" ion="ca"/>

                <spikeThresh value="0 mV"/>
                <specificCapacitance value="1.0 uF_per_cm2"/>
                <initMembPotential value="-65.0 mV"/>

            </membraneProperties>

            <intracellularProperties>
                <!--
                <species id="ca" ion="ca"
                    concentrationModel="simple_decay"
                    initialConcentration="5e-6 mM"
                    initialExtConcentration="2 mM"/>
                -->
                <species id="ca" ion="ca"
                    concentrationModel="CaClamp"
                    initialConcentration="5e-6 mM"
                    initialExtConcentration="2 mM"/>

                <resistivity value="0.1 kohm_cm"/>

            </intracellularProperties>

        </biophysicalProperties>

    </cell>

    <!-- Point process: Current clamp -->
    <pulseGenerator id="IClamp" delay="4ms" duration="6ms" amplitude="0.005nA" />

    <!-- Create a single-cell network -->
    <network id="net1" type="networkWithTemperature" temperature = "24 degC">
        <population id="pop" component="olm1" type="populationList" size="1">
            <instance id="0">
                <location x="0" y="0" z="0"/>
            </instance>
        </population>

        <inputList id="IClamp" component="IClamp" population="pop">
            <input id="0" target="../pop/0/olm1" destination="synapses"/>
        </inputList>

    </network>

</neuroml>
