<?xml version='1.0' encoding='UTF-8'?>
<Lems>

    <Target component="sim1"/>

    <Include file="Cells.xml"/>
    <Include file="Networks.xml"/>
    <Include file="Simulation.xml"/>

    <Include file="LawrenceOLM_test_Ca.net.nml"/>

    <Include file="../../Capool.channel.nml"/>
    <Include file="ica_clamp.channel.nml"/>

    <Include file="../../ICaL.channel.nml"/>
    <Include file="../../ICaT.channel.nml"/>
    <Include file="../../IKCa.channel.nml"/>
    <Include file="channelDensityGHK2.xml"/>

    <Dimension name="substancedensity" n="1" l="-2"/>
    <Unit symbol="mol_per_cm2" dimension="substancedensity" power="4"/>
    <Dimension name="substance_per_time" n="1" t="-1"/>
    <Unit symbol="mol_per_ms" dimension="substance_per_time" power="3"/>
    <!--
    <Dimension name="concentration_per_time" n="1" l="-3" t="-1" />
    -->

    <!-- Simulation specifications -->
    <Simulation id="sim1" length="200ms" step="0.001ms" target="net1">

      <Display id="d1" title="ca0 (mM)" timeScale="1ms" xmin="0" xmax="200" ymin="4.5" ymax="5.5">
        <Line id="ca0" quantity="pop/0/olm1/biophysicalProperties/intracellularProperties/ca/epic_Capool/concentration" scale="1e-6 mM"  color="#ff0000" timeScale="1ms"/>
      </Display>

      <Display id="d2" title="ca1 (mM)" timeScale="1ms" xmin="0" xmax="200" ymin="4.5" ymax="5.5">
        <Line id="ca1" quantity="pop/0/olm1/biophysicalProperties/intracellularProperties/ca/epic_Capool/ca1" scale="1e-6 mM"  color="#00ff00" timeScale="1ms"/>
      </Display>

      <Display id="d3" title="ca2 (mM)" timeScale="1ms" xmin="0" xmax="200" ymin="4.5" ymax="5.5">
        <Line id="ca2" quantity="pop/0/olm1/biophysicalProperties/intracellularProperties/ca/epic_Capool/ca1" scale="1e-6 mM"  color="#ffff00" timeScale="1ms"/>
      </Display>

      <Display id="d4" title="ca3 (mM)" timeScale="1ms" xmin="0" xmax="200" ymin="4.5" ymax="5.5">
        <Line id="ca3" quantity="pop/0/olm1/biophysicalProperties/intracellularProperties/ca/epic_Capool/ca1" scale="1e-6 mM"  color="#0000ff" timeScale="1ms"/>
      </Display>

      <Display id="d5" title="pump (mol/cm2)" timeScale="1ms" xmin="0" xmax="200" ymin="0" ymax="0.5">
        <Line id="pump" quantity="pop/0/olm1/biophysicalProperties/intracellularProperties/ca/epic_Capool/pump" scale="1 mol_per_cm2"  color="#0ff0ff" timeScale="1ms"/>
      </Display>

      <Display id="d6" title="pumpca (mol/cm2)" timeScale="1ms" xmin="0" xmax="200" ymin="0" ymax="5e-22">
        <Line id="pumpca" quantity="pop/0/olm1/biophysicalProperties/intracellularProperties/ca/epic_Capool/pumpca" scale="1 mol_per_cm2"  color="#fff0ff" timeScale="1ms"/>
      </Display>

      <OutputFile id="of0" fileName="lems_ca.dat">
        <OutputColumn id="v" quantity="pop/0/olm1/v"/>
        <OutputColumn id="ca0" quantity="pop/0/olm1/biophysicalProperties/intracellularProperties/ca/epic_Capool/concentration"/>
        <OutputColumn id="ca1" quantity="pop/0/olm1/biophysicalProperties/intracellularProperties/ca/epic_Capool/ca1"/>
        <OutputColumn id="ca2" quantity="pop/0/olm1/biophysicalProperties/intracellularProperties/ca/epic_Capool/ca2"/>
        <OutputColumn id="ca3" quantity="pop/0/olm1/biophysicalProperties/intracellularProperties/ca/epic_Capool/ca3"/>
        <OutputColumn id="pump" quantity="pop/0/olm1/biophysicalProperties/intracellularProperties/ca/epic_Capool/pump"/>
        <OutputColumn id="pumpca" quantity="pop/0/olm1/biophysicalProperties/intracellularProperties/ca/epic_Capool/pumpca"/>
        <!--
        <OutputColumn id="ica_chans" quantity="pop/0/olm1/biophysicalProperties/intracellularProperties/ca/epic_Capool/iCa_chans"/>
        <OutputColumn id="f_flux" quantity="pop/0/olm1/biophysicalProperties/intracellularProperties/ca/epic_Capool/f_flux_nml"/>
        <OutputColumn id="b_flux" quantity="pop/0/olm1/biophysicalProperties/intracellularProperties/ca/epic_Capool/b_flux_nml"/>
        <OutputColumn id="ica_pump" quantity="pop/0/olm1/biophysicalProperties/intracellularProperties/ca/epic_Capool/iCa_pump"/>
        <OutputColumn id="debug" quantity="pop/0/olm1/biophysicalProperties/intracellularProperties/ca/epic_Capool/debugVal"/>
        -->
      </OutputFile>

    </Simulation>

</Lems>
