<?xml version="1.0" encoding="UTF-8"?>
<neuroml xmlns="http://www.neuroml.org/schema/neuroml2"
         xmlns:xsi="http://www.w3.org/2001/XMLSchema-instance"
         xsi:schemaLocation="http://www.neuroml.org/schema/neuroml2  https://raw.github.com/NeuroML/NeuroML2/development/Schemas/NeuroML2/NeuroML_v2beta2.xsd"
         id="olm1">

    <include href="../../Capool.channel.nml"/>
    <include href="ica_clamp.channel.nml"/>

    <include href="../../ICaL.channel.nml"/>
    <include href="../../ICaT.channel.nml"/>
    <include href="../../IKCa.channel.nml"/>

    <!-- Passive conductance -->
    <ionChannel id="passive_chan" type="ionChannelPassive" conductance="10pS" species="non_specific"/>

    <!-- Cellular properties -->
    <cell id="olm1">

        <morphology id="just_a_cylinder">

            <segment id="0" name="Soma">
                <proximal x="0.0" y="0.0" z="0.0" diameter="1.0"/>
                <distal x="0.0" y="0.0" z="10.0" diameter="1.0"/>
            </segment>

            <segmentGroup id="soma_group">
                <member segment="0"/>
            </segmentGroup>

        </morphology>

        <biophysicalProperties id="biophys">

            <membraneProperties>

                <channelDensity id="passive" ionChannel="passive_chan" condDensity="0.3mS_per_cm2" erev="-65 mV" ion="non_specific"/>
                <!-- To test only the Capool with a fixed ica:
                <channelDensity condDensity="1e-6 mS_per_cm2" id="ica_clamp_all" ionChannel="ica_clamp" erev="50mV" ion="ca"/>-->

                <!--
                <channelDensityGHK2 id="ICaL_all" ionChannel="ICaL" condDensity="0.02mS_per_cm2" ion="ca"/>
                <channelDensityGHK2 id="ICaT_all" ionChannel="ICaT" condDensity="0.02mS_per_cm2" ion="ca"/>
                <channelDensity id="IKCa_all" ionChannel="IKCa" condDensity="0.1mS_per_cm2" erev="-95mV" ion="k"/>
                -->

                <spikeThresh value="0 mV"/>
                <specificCapacitance value="1.0 uF_per_cm2"/>
                <initMembPotential value="-65.0 mV"/>

            </membraneProperties>

            <intracellularProperties>

                <species id="ca" ion="ca" concentrationModel="epic_Capool"
                         initialConcentration="5e-6 mM" initialExtConcentration="2 mM"/>

                <resistivity value="0.1 kohm_cm"/>

            </intracellularProperties>

        </biophysicalProperties>

    </cell>

    <!-- Point process: Current clamp -->
    <pulseGenerator id="IClamp" delay="40ms" duration="120ms" amplitude="0.001nA"/>

    <!-- Create a single-cell network -->
    <network id="net1" type="networkWithTemperature" temperature = "24 degC">
        <population id="pop" component="olm1" type="populationList" size="1">
            <instance id="0">
                <location x="0" y="0" z="0"/>
            </instance>
        </population>

        <inputList id="IClamp" component="IClamp" population="pop">
            <input id="0" target="../pop/0/olm1" destination="synapses"/>
        </inputList>

    </network>

</neuroml>
